# OpenSim document version 30000
Model:
  ForceSet:
    Millard2012EquilibriumMuscle Foot1: max_isometric_force=0.8 optimal_fiber_length=0.005358
        tendon_slack_length=0.000536 pennation_angle_at_optimal=0 [radians] default_fiber_length=0.005358
      PathPoint Foot1_node0: radius (0.008502 0.00073 0.00128)
      PathPoint Foot1_node1: radius (0.01158 0.000975 0.00124)
      PathPoint Foot1_node2: foot (0.001197 0.000246 -0.001244)
    Millard2012EquilibriumMuscle Foot2: max_isometric_force=0.8 optimal_fiber_length=0.005067
        tendon_slack_length=0.000507 pennation_angle_at_optimal=0 default_fiber_length=0.005067
      PathPoint Foot2_node0: radius (0.00897 0.00102 0.000175)
      PathPoint Foot2_node1: radius (0.012524 0.001545 -0.00006)
      PathPoint Foot2_node2: foot (0.000461 -0.000661 -0.00133)
      PathPoint Foot2_node3: foot (0.001205 -0.000717 -0.001444)
    Millard2012EquilibriumMuscle Radius1: max_isometric_force=1 optimal_fiber_length=0.006026
        tendon_slack_length=0.000603 pennation_angle_at_optimal=0 default_fiber_length=0.006026
      PathPoint Radius1_node0: humerus (0.003306 -0.002112 0.00033)
      PathPoint Radius1_node1: radius (0.002067 -0.000103 0.000365)
    Millard2012EquilibriumMuscle Radius2: max_isometric_force=1 optimal_fiber_length=0.005879
        tendon_slack_length=0.000588 pennation_angle_at_optimal=0 default_fiber_length=0.005879
      PathPoint Radius2_node0: humerus (0.006241 0.000625 -0.000198)
      PathPoint Radius2_node1: humerus (0.008001 0.001263 -0.000321)
      PathPoint Radius2_node2: radius (-0.001867 -0.000494 -0.000722)
    Millard2012EquilibriumMuscle Humerus1: max_isometric_force=1.4 optimal_fiber_length=0.0122
        tendon_slack_length=0.00122 pennation_angle_at_optimal=0 default_fiber_length=0.0122
      PathPoint Humerus1_node0: Mouse (0.007749 0.008172 0.01792)
      PathPoint Humerus1_node1: Mouse (0.008774 0.00573 0.018953)
      PathPoint Humerus1_node2: humerus (-0.001105 -0.001781 0.000541)
      PathPoint Humerus1_node3: humerus (0.004853 -0.001597 0.000213)
    Millard2012EquilibriumMuscle Humerus2: max_isometric_force=1.4 optimal_fiber_length=0.010242
        tendon_slack_length=0.001024 pennation_angle_at_optimal=0 default_fiber_length=0.010242
      PathPoint Humerus2_node0: Mouse (0.008054 0.007992 0.016959)
      PathPoint Humerus2_node1: Mouse (0.009183 0.006019 0.01804)
      PathPoint Humerus2_node2: humerus (0.002577 0.000071 -0.000113)
      PathPoint Humerus2_node3: humerus (0.005647 0.000445 -0.000328)
    Millard2012EquilibriumMuscle Humerus3: max_isometric_force=1.4 optimal_fiber_length=0.010242
        tendon_slack_length=0.001024 pennation_angle_at_optimal=0 default_fiber_length=0.010242
      PathPoint Humerus3_node0: humerus (0.0054 -0.000212 0.000538)
      PathPoint Humerus3_node1: humerus (0.002481 -0.000668 0.000709)
      PathPoint Humerus3_node2: humerus (-0.000186 0.000033 0.001132)
      PathPoint Humerus3_node3: Mouse (0.010232 0.006149 0.0191)
      PathPoint Humerus3_node4: Mouse (0.00861 0.008542 0.017764)
    Millard2012EquilibriumMuscle Humerus4: max_isometric_force=1.4 optimal_fiber_length=0.010242
        tendon_slack_length=0.001024 pennation_angle_at_optimal=0 default_fiber_length=0.010242
      PathPoint Humerus4_node0: humerus (0.004758 -0.000841 -0.000795)
      PathPoint Humerus4_node1: humerus (0.001309 -0.001068 -0.000559)
      PathPoint Humerus4_node2: Mouse (0.008171 0.005046 0.018416)
      PathPoint Humerus4_node3: Mouse (0.007787 0.007778 0.017372)
